# OpenSim document version 30000
Model LeftSideModel_2D_torque_revolute:
  length_units: meters
  force_units: N
  gravity: 0 -9.80665 0
  credits:
    Frank Anderson, Peter Loan, Ayman Habib, Ajay Seth, Michael Sherman
  BodySet:
    Body ground: mass=0 mass_center=(0 0 0) inertia_xx=1 inertia_yy=1 inertia_zz=1
    Body calcn_l: mass=1.46671 mass_center=(0.1 0.03 0) inertia_xx=0.001642715 inertia_yy=0.004576136
        inertia_zz=0.004810809 meshes=l_foot.vtp
      CustomJoint calcn_l_toGround: parent_body=ground location_in_parent=(0 0 0) location=(0.2 0 0)
        Coordinate calcn_l_aux: motion_type=rotational default_value=0 range=(-3 3) clamped=true
        SpatialTransform: axes_held_at_zero=(rotation2 rotation3 translation1 translation2 translation3)
          TransformAxis rotation1: coordinates=calcn_l_aux axis=(0 0 1) LinearFunction(coefficients=1 0)
    Body talus_l: mass=0.1173368 mass_center=(0 0 0) inertia_xx=0.001173368 inertia_yy=0.001173368
        inertia_zz=0.001173368 meshes=l_talus.vtp
      WeldJoint subtalar_l: parent_body=calcn_l location_in_parent=(0 0 0) location=(-0.04877 -0.04195 -0.00792)
    Body tibia_l: mass=3.702622 mass_center=(0 -0.192227 0) inertia_xx=0.05269097 inertia_yy=0.005343729
        inertia_zz=0.05356168 meshes=(l_tibia.vtp l_fibula.vtp)
      CustomJoint ankle_l: parent_body=talus_l location_in_parent=(0 0 0) location=(0 -0.4427296 0) reverse=true
        Coordinate ankle_angle_l: motion_type=rotational default_value=0 range=(-1.047198 1.047198) clamped=true
        SpatialTransform: axes_held_at_zero=(rotation2 rotation3 translation1 translation2 translation3)
          TransformAxis rotation1: coordinates=ankle_angle_l axis=(0 0 1) LinearFunction(coefficients=1 0)
    Body femur_l: mass=9.313966 mass_center=(0 -0.171294 0) inertia_xx=0.1395145 inertia_yy=0.03181449
        inertia_zz=0.148211 meshes=l_femur.vtp
      CustomJoint knee_l: parent_body=tibia_l location_in_parent=(0 0 0) location=(0 0 0) reverse=true
        Coordinate knee_angle_l: motion_type=rotational default_value=0 range=(-2.61799 0.1745329) clamped=true
        SpatialTransform: axes_held_at_zero=(rotation2 rotation3 translation3)
          TransformAxis rotation1: coordinates=knee_angle_l axis=(0 0 1) LinearFunction(coefficients=1 0)
          TransformAxis translation1: coordinates=knee_angle_l axis=(1 0 0)
            MultiplierFunction: scale=1.007611
              SimmSpline: x=(-2.0944 -1.74533 -1.39626 -1.0472 -0.698132 -0.349066 -0.174533 0.197344 0.337395 0.490178 1.52146 2.0944)
                  y=(-0.0032 0.00179 0.00411 0.0041 0.00212 -0.001 -0.0031 -0.005227 -0.005435 -0.005574 -0.005435 -0.00525)
          TransformAxis translation2: coordinates=knee_angle_l axis=(0 1 0)
            MultiplierFunction: scale=1.007611
              SimmSpline: x=(-2.0944 -1.22173 -0.523599 -0.349066 -0.174533 0.159149 2.0944)
                  y=(-0.4226 -0.4082 -0.399 -0.3976 -0.3966 -0.395264 -0.396)
    Body pelvis: mass=6.009378 mass_center=(-0.0652792 0 0) inertia_xx=0.05141722 inertia_yy=0.04356459
        inertia_zz=0.0289597 meshes=(sacrum.vtp pelvis.vtp l_pelvis.vtp)
      CustomJoint hip_l: parent_body=femur_l location_in_parent=(0 0 0) location=(-0.06527923 -0.06103192 -0.07709781)
          reverse=true
        Coordinate hip_flexion_l: motion_type=rotational default_value=0 range=(-2.094395 2.4) clamped=true
        SpatialTransform: axes_held_at_zero=(rotation2 rotation3 translation1 translation2 translation3)
          TransformAxis rotation1: coordinates=hip_flexion_l axis=(0 0 1) LinearFunction(coefficients=1 0)
    Body torso: mass=17.17213 mass_center=(-0.0334543 0.356846 0) inertia_xx=0.7373 inertia_yy=0.3777 inertia_zz=0.7157
        meshes=(hat_spine.vtp hat_jaw.vtp hat_skull.vtp hat_ribs.vtp)
      WeldJoint back: parent_body=pelvis location_in_parent=(-0.09297904 0.07525116 0) location=(0 0 0)
    Body toes_l: mass=0.2541515 mass_center=(0.0346 0.006 0.0175) inertia_xx=0.0001173368 inertia_yy=0.0002346736
        inertia_zz=0.001173368 meshes=l_bofoot.vtp
      WeldJoint mtp_l: parent_body=calcn_l location_in_parent=(0.1788 -0.002 -0.00108) location=(0 0 0)
  ForceSet:
    CoordinateActuator ankle_angle_l_torq: coordinate=ankle_angle_l optimal_force=250
    CoordinateActuator knee_angle_l_torq: coordinate=knee_angle_l optimal_force=250
    CoordinateActuator hip_flexion_l_torq: coordinate=hip_flexion_l optimal_force=200
